clear
Redirect "CircuitoMT_2023124950_JMLT310_--MBS-1P-T--.dss"
Redirect "CodCondutor_2023124950_JMLT310_--MBS-1P-T--.dss"
Redirect "TransformadorMTMTMTBT_2023124950_JMLT310_--MBS-1P-T--.dss"
Redirect "SegmentosMT_2023124950_JMLT310_--MBS-1P-T--.dss"
Redirect "ChavesMT_2023124950_JMLT310_--MBS-1P-T--.dss"
Redirect "SegmentosBT_2023124950_JMLT310_--MBS-1P-T--.dss"
Redirect "RamaisBT_2023124950_JMLT310_--MBS-1P-T--.dss"
Redirect "Medidores_2023124950_JMLT310_--MBS-1P-T--.dss"
Redirect "CurvaCarga_2023124950_JMLT310_--MBS-1P-T--.dss"
Redirect "CargasBT_DU01_2023124950_JMLT310_--MBS-1P-T--.dss"
Redirect "CargasMT_DU01_2023124950_JMLT310_--MBS-1P-T--.dss"
!Redirect "GD_BT_2023124950_JMLT310_--MBS-1P-T--.dss"
!Redirect "GD_MT_2023124950_JMLT310_--MBS-1P-T--.dss"
Set mode = daily
Set Voltagebases = [0.22 0.24 13.8]
Calc Voltagebases
Set tolerance = 0.0001
Set maxcontroliter = 10
!Set algorithm = newton
!Solve mode = direct

Solve

buscoords buscoords.csv
